<?xml version="1.0"?>
<!--
  ASK21mi engine: IAE 50R-AA

	Sources:	https://www.alexander-schleicher.de/flugzeuge/ask-21-mi/
			http://www.schaenis-soaring.ch/fileadmin/user_upload/Doku-Download/ASK21Mi_Flughandbuch.pdf
-->

<piston_engine name="IAE50R-AA">
  <minmp unit="INHG">         10.0 </minmp>
  <maxmp unit="INHG">         28.5 </maxmp>
  <displacement unit="IN3"> 17.941 </displacement>
  <maxhp>        55.2339 </maxhp>
  <cycles>         4.0 </cycles>
  <idlerpm>      3200.0 </idlerpm>
  <maxrpm>      7750.0 </maxrpm>
  <sparkfaildrop>  0.1 </sparkfaildrop>
  <volumetric-efficiency> 0.85 </volumetric-efficiency>
  <man-press-lag> 0.1 </man-press-lag>
  <static-friction  unit="HP"> 0.27 </static-friction>
  <starter-torque> 43.98 </starter-torque>
  <starter-rpm> 3300 </starter-rpm>
 <!-- Defining <bsfc> over-rides the built-in horsepower calculations -->
 <!--<bsfc>           0.45 </bsfc>-->
  <stroke unit="IN">  4.375 </stroke>
  <bore unit="IN">    5.125 </bore>
  <cylinders>         1.0  </cylinders>
  <compression-ratio>  9.0 </compression-ratio>
</piston_engine>
