<aerodynamics>
<!-- FDM rework by Niels Krenz March 2021 on basis D-ECHO's initial version -->
        <hysteresis_limits unit="DEG">
            <min>9</min>
            <max>19</max>
        </hysteresis_limits>
<!-- ########################### -->
<!-- #########  LIFT  ########### -->
<!-- ########################### -->
  <axis name="LIFT">
    <function name="aero/force/Lift_alpha">
      <description>Lift due to alpha</description>
      <product>
          <property>aero/qbar-psf</property>
          <property>metrics/Sw-sqft</property>
          <table>
                        <independentVar lookup="row">aero/alpha-deg</independentVar>
                        <independentVar lookup="column">aero/stall-hyst-norm</independentVar>
                        <tableData>
			0	1
		-4	0.164	0.16 <!-- VSP+manual, stall estimated -->
		0	0.575	0.575
		8	1.396	1.396
		10	1.59	1.59
		12	1.8	1.8
		13	1.84	1.2
		14	1.88	1.2
		15	1.89	1.2
		16	1.9	1.2
		17	1.82	1.2
		18	1.7	1.2
		19	1.58	1.2
		20	1.3	1.2
		22	1	1
                          </tableData>
          </table>
	  <!--(ported from C172p:) ground effect--> <!--  VSP -->
                <table>
                    <independentVar>aero/h_b-cg-ft</independentVar>
                    <tableData>
                          0.0000	1.2
                          0.0500	1.1
                          0.1800	1.044
                          0.3600	1.000
                      </tableData>
                </table>
      </product>
    </function>

    <function name="aero/force/Lift_speedbrake">
       <description>Delta Lift due to speedbrake</description>
       <product>
           <property>aero/qbar-psf</property>
           <property>metrics/Sw-sqft</property>
           <property>fcs/speedbrake-pos-norm</property>
           <value>-0.13</value> <!--hand calculation 15% lift loss -->
       </product>
    </function>

    <function name="aero/force/Lift_elevator">
       <description>Lift due to Elevator Deflection</description>
       <product>
           <property>aero/qbar-psf</property>
           <property>metrics/Sw-sqft</property>
           <property>fcs/elevator-pos-rad</property>
           <value>0.285</value> <!-- VSP -->
       </product>
    </function>
</axis>
<!-- ########################### -->
<!-- #########  DRAG  ########### -->
<!-- ########################### -->
<axis name="DRAG">
    <function name="aero/force/Drag_basic">
       <description>Drag at zero lift</description>
       <product>
          <property>aero/qbar-psf</property>
          <property>metrics/Sw-sqft</property>
          <table>
            <independentVar lookup="row">aero/alpha-rad</independentVar>
            <tableData>
             -1.57    0.5
             -0.26    0.01127
              0.00    0.01127 <!-- hand calc 0,07 -->
              0.26    0.01127
              1.57    0.9
            </tableData>
          </table>
       </product>
    </function>
    <function name="aero/force/Drag_induced">
       <description>Induced drag</description>
         <product>
           <property>aero/qbar-psf</property>
           <property>metrics/Sw-sqft</property>
           <property>aero/cl-squared</property>
           <value>0.0208</value> <!-- VSP -->
                <table>
                    <independentVar>aero/h_b-cg-ft</independentVar> <!-- VSP -->
                    <tableData>
                          0.0000	0.4300
                          0.0500	0.5260
                          0.1800	0.670
                          0.3600	1
                      </tableData>
                </table>
         </product>
    </function>
    <function name="aero/force/Drag_correction">
       <description>correction to match polar</description>
         <product>
         <property>aero/qbar-psf</property>
          <property>metrics/Sw-sqft</property>
          <table>
            <independentVar lookup="row">aero/alpha-deg</independentVar>
            <tableData>
             -4    0.0012
             -2    0.0011
              0    0
              2    -0.0012
              4    -0.002
              6    -0.002
              8    -0.0025
            </tableData>
          </table>
         </product>
    </function>
    <function name="aero/force/Drag_speedbrake">
       <description>Drag due to speedbrakes</description>
         <product>
           <property>aero/qbar-psf</property>
           <property>metrics/Sw-sqft</property>
           <property>fcs/speedbrake-pos-norm</property>
           <value>1.5</value> <!-- subjective tuning factor -->
           <value>0.03</value> <!-- hand calc. abt. 6ft² -->
         </product>
    </function>
    <function name="aero/force/Drag_beta">
       <description>Drag due to sideslip</description>
       <product>
          <property>aero/qbar-psf</property>
          <property>metrics/Sw-sqft</property>
          <table>
            <independentVar lookup="row">aero/beta-rad</independentVar>
            <tableData>
              -1.57    1.430
              -0.26    0.00156 <!-- VSP, might not be reliable-->
               0.00    0.000
               0.26    0.00156 <!-- VSP -->
               1.57    1.430
            </tableData>
          </table>
       </product>
    </function>
    <function name="aero/force/Drag_elevator">
       <description>Drag due to Elevator Deflection</description>
       <product>
           <property>aero/qbar-psf</property>
           <property>metrics/Sw-sqft</property>
           <abs><property>fcs/elevator-pos-rad</property></abs>
           <value>0.0037</value> <!-- VSP -->
       </product>
    </function>

    <function name="aero/force/Drag_stall">
       <description>Drag due to stall</description>
       <product>
           <property>aero/qbar-psf</property>
           <property>metrics/Sw-sqft</property>
           <abs><property>aero/stall-hyst-norm</property></abs>
           <value>0.2</value> <!-- estimated -->
       </product>
    </function>
  </axis>
<!-- ########################### -->
<!-- #########  side  ########### -->
<!-- ########################### -->
<axis name="SIDE">
    <function name="aero/force/Side_beta">
       <description>Side force due to beta</description>
       <product>
           <property>aero/qbar-psf</property>
           <property>metrics/Sw-sqft</property>
           <property>aero/beta-rad</property>
           <value>-0.217</value> <!-- VSP -->
       </product>
    </function>
    <function name="aero/force/side_rudder">
       <description>Side force due to rudder</description>
       <product>
           <property>aero/qbar-psf</property>
           <property>metrics/Sw-sqft</property>
           <property>fcs/rudder-pos-rad</property>
           <value>-0.138</value> <!-- VSP -->
       </product>
    </function>
<function name="aero/force/side_yawrate">
	<description>Side force due to yaw rate</description> <!-- VSP -->
	<product>
           <property>aero/qbar-psf</property>
           <property>metrics/Sw-sqft</property>
           <property>aero/bi2vel</property>
           <property>velocities/r-aero-rad_sec</property>
	<table>
		<independentVar lookup="row">velocities/mach</independentVar>
		<independentVar lookup="column">aero/alpha-deg</independentVar>
		<independentVar lookup="table">aero/beta-deg</independentVar>
		<tableData breakPoint="0.0">
		-4	-2	0	2	4	6	8
	0.05	0.1576538	0.1598199	0.1638919	0.1674158	0.1697583	0.1718753	0.1748368
	0.1	0.1577529	0.1601007	0.163974	0.1674345	0.1701725	0.1725869	0.1755345
	0.15	0.1572737	0.1606945	0.1655826	0.16967	0.171421	0.1737758	0.1767106
	0.2	0.1587795	0.1622027	0.1649716	0.1706121	0.1729329	0.1757174	0.1783984
	0.25	0.1602082	0.1634014	0.16573	0.171371	0.1747283	0.1766047	0.1810001
		</tableData>
		<tableData breakPoint="5.0">
		-4	-2	0	2	4	6	8
	0.05	0.158455	0.1609238	0.1632958	0.1572952	0.1677153	0.1727242	0.1768876
	0.1	0.1587928	0.1610627	0.1633162	0.1580343	0.1688049	0.1731769	0.1775604
	0.15	0.1594533	0.1617196	0.1668481	0.1682269	0.1698274	0.1746289	0.1788999
	0.2	0.1605942	0.1627595	0.1673368	0.1690391	0.1713379	0.1760918	0.1805893
	0.25	0.1618792	0.163939	0.1685553	0.1715145	0.1733198	0.1780793	0.1827072
		</tableData>
		<tableData breakPoint="10.0">
		-4	-2	0	2	4	6	8
	0.05	0.1590333	0.166605	0.1651298	0.1700794	0.173173	0.1770333	0.1835761
	0.1	0.1589556	0.1660993	0.1644533	0.1697957	0.1725172	0.1784436	0.1862753
	0.15	0.1591862	0.1662736	0.1651724	0.1706271	0.1729215	0.1805078	0.1860102
	0.2	0.1595523	0.1686841	0.1661503	0.1732825	0.1741593	0.1823013	0.1791545
	0.25	0.1618257	0.1684263	0.1674661	0.1749575	0.1770333	0.1841862	0.176312
		</tableData>
	</table>
	</product>
</function>
<function name="aero/force/side_rollrate">
	<description>Side force due to roll rate</description> <!-- VSP -->
	<product>
           <property>aero/qbar-psf</property>
           <property>metrics/Sw-sqft</property>
           <property>aero/bi2vel</property>
           <property>velocities/p-rad_sec</property>
<table>
<independentVar lookup="row">velocities/mach</independentVar>
<independentVar lookup="column">aero/alpha-deg</independentVar>
<independentVar lookup="table">aero/beta-deg</independentVar>
		<tableData breakPoint="0.0">
				-4.0		-2.0		0.0			2.0			4.0			6.0			8.0
				0.05		-0.099049	-0.1016847	-0.1040245	-0.1109244	0.0864288	-0.0990489	-0.1200052
				0.1		-0.0992661	-0.1010316	-0.1042214	-0.111134	-0.0254319	-0.1046529	-0.1197951
				0.15		-0.0996231	-0.1000245	-0.1045714	-0.1110655	-0.0844598	-0.104823	-0.1203823
				0.2		-0.09958	-0.1014865	-0.1051939	-0.1094068	-0.0988652	-0.105112	-0.1215023
				0.25		-0.1001513	-0.1027649	-0.1056579	-0.109716	-0.1005708	-0.104865	-0.1224322
		</tableData>
		<tableData breakPoint="5.0">
				-4.0		-2.0		0.0			2.0			4.0			6.0			8.0
				0.05		-0.1140448	-0.1074426	-0.0851052	-0.0976906	-0.1051111	-0.1255037	-0.1165366
				0.1		-0.1147611	-0.1124776	-0.1139443	-0.1255119	-0.0638153	-0.1163424	-0.1171491
				0.15		-0.1160041	-0.1006658	-0.107253	-0.1060039	-0.0757773	-0.1121482	-0.1177937
				0.2		-0.1165693	-0.1125268	-0.105819	-0.1138509	-0.0848341	-0.1137026	-0.1197003
				0.25		-0.1173795	-0.1058204	-0.1053702	-0.1124937	-0.0889704	-0.1159125	-0.1225562
		</tableData>
		<tableData breakPoint="10.0">
				-4.0		-2.0		0.0			2.0			4.0			6.0			8.0
				0.05		-0.0937851	-0.0914421	-0.1149097	-0.103804	-0.1167953	-0.1182122	-0.1016005
				0.1		-0.096138	-0.0918153	-0.1161537	-0.1174672	-0.1093877	-0.1156416	-0.1015159
				0.15		-0.095182	-0.0922474	-0.1180451	-0.1057214	-0.1108375	-0.1157058	-0.1050245
				0.2		-0.100176	-0.089098	-0.1185466	-0.1053267	-0.1109198	-0.1158363	-0.1093405
				0.25		-0.0971941	-0.0933533	-0.1046061	-0.1092523	-0.1110761	-0.118951	-0.1199488
		</tableData>
</table>
	</product>
</function>
  </axis>
<!-- ########################### -->
<!-- #########  ROLL  ########### -->
<!-- ########################### -->
<axis name="ROLL">
    <function name="aero/moment/Roll_beta">
       <description>Roll moment due to beta</description> <!-- VSP -->
       <product>
           <property>aero/qbar-psf</property>
           <property>metrics/Sw-sqft</property>
           <property>metrics/bw-ft</property>
           <property>aero/beta-rad</property>
                    <table>
                        <independentVar lookup="row">aero/alpha-deg</independentVar>
                        <tableData>
                            -4	-0.063
                            -2	-0.0625
                            0	-0.0614
                            2	-0.0595
                            4	-0.0579
                            6	-0.0531
                            8	-0.0532
                         </tableData>
                    </table>
       </product>
    </function>
	<function name="aero/moment/roll_damp2">
	<description>Roll damping derivative</description> <!-- VSP -->
	<product>
           <property>aero/qbar-psf</property>
           <property>metrics/Sw-sqft</property>
           <property>metrics/bw-ft</property>
           <property>aero/bi2vel</property>
           <property>velocities/p-aero-rad_sec</property>
 		<value>-1</value> <!-- sign change -->
   <table>
			<independentVar lookup="row">velocities/mach</independentVar>
			<independentVar lookup="column">aero/alpha-deg</independentVar>
			<independentVar lookup="table">aero/beta-deg</independentVar>
			<tableData breakPoint="0.0">
	-4.0	-2.0	0.0	2.0	4.0	6.0	8.0
	0.05	0.5828020	0.5957524	0.6040959	0.6096414	0.6061787	0.6069222	0.5994348
	0.10	0.5844372	0.5974415	0.6058855	0.6114016	0.6098798	0.6086474	0.6012488
	0.15	0.5871875	0.6003085	0.6088997	0.6143616	0.6137071	0.6116608	0.6043790
	0.20	0.5910952	0.6042479	0.6132526	0.6184704	0.6187203	0.6159145	0.6090375
	0.25	0.5962440	0.6095197	0.6189751	0.6240869	0.6240315	0.6211292	0.6151963
			</tableData>
			<tableData breakPoint="5.0">
	-4.0	-2.0	0.0	2.0	4.0	6.0	8.0
	0.05	0.5793883	0.5921915	0.6015395	0.6059647	0.6072447	0.6040563	0.5975022
	0.10	0.5810390	0.5937825	0.6035827	0.6076761	0.6080830	0.6061733	0.5993448
	0.15	0.5837418	0.5967625	0.6061549	0.6108241	0.6110218	0.6092712	0.6025209
	0.20	0.5876964	0.6007921	0.6101886	0.6149174	0.6150470	0.6137891	0.6071542
	0.25	0.5929739	0.6061525	0.6154801	0.6201987	0.6210180	0.6196161	0.6127033
			</tableData>
			<tableData breakPoint="10.0">
	-4.0	-2.0	0.0	2.0	4.0	6.0	8.0
	0.05	0.5714673	0.5839097	0.5926257	0.5979418	0.5990617	0.5962636	0.5900427
	0.10	0.5731539	0.5855623	0.5944442	0.6007321	0.6005757	0.5981957	0.5918693
	0.15	0.5760456	0.5884311	0.5972646	0.6031421	0.6038885	0.6015345	0.5943533
	0.20	0.5799425	0.5922108	0.6013083	0.6073888	0.6081503	0.6059441	0.5995419
	0.25	0.5849823	0.5976038	0.6068295	0.6129346	0.6140283	0.6118557	0.6054225
			</tableData>
		</table>
	</product>
	</function>
    <function name="aero/moment/Roll_aileron">
       <description>Roll moment due to aileron</description> <!-- VSP, includes differential ailerons -->
       <product>
          <property>aero/qbar-psf</property>
          <property>metrics/Sw-sqft</property>
          <property>metrics/bw-ft</property>
          <property>fcs/aileron-cmd-norm</property>
	<value>0.433</value> <!-- max deflection -->
	<value>-1</value>
          <table>
             <independentVar lookup="row">aero/alpha-deg</independentVar>
             <independentVar lookup="column">velocities/mach</independentVar>
             <tableData>
 0.05	0.1	0.15	0.2	0.25
-4	-0.195	-0.196	-0.197	-0.198	-0.2
-2	-0.197	-0.197	-0.198	-0.199	-0.201
0	-0.197	-0.197	-0.198	-0.199	-0.202
2	-0.197	-0.197	-0.198	-0.199	-0.201
4	-0.195	-0.195	-0.196	-0.198	-0.199
6	-0.193	-0.194	-0.195	-0.196	-0.199
8	-0.191	-0.192	-0.192	-0.194	-0.194
             </tableData>
           </table>
	  <!-- (ported from c172p:) the ailerons are less efficient and even create an opposite roll moment close to stall because deflection down makes the wing portion stall-->
                    <table>
                        <independentVar lookup="row">aero/alpha-deg</independentVar>
                        <tableData>
                            15    1
                            16    0.3
                            18   -0.1
                        </tableData>
                    </table>
        </product>
    </function>
    <function name="aero/moment/Roll_rudder">
       <description>Roll moment due to rudder</description>
       <product>
           <property>aero/qbar-psf</property>
           <property>metrics/Sw-sqft</property>
           <property>metrics/bw-ft</property>
           <property>fcs/rudder-pos-rad</property>
           <value>0.0058</value> <!-- VSP -->
       </product>
    </function>
</axis>
<!-- ########################### -->
<!-- #########  PITCH  ########### -->
<!-- ########################### -->
<axis name="PITCH">
    <function name="aero/moment/pitch_base">
       <description>Pitch moment zero alpha</description>
       <product>
           <property>aero/qbar-psf</property>
           <property>metrics/Sw-sqft</property>
           <property>metrics/cbarw-ft</property>
           <value>-0.0329</value> <!-- VSP, new introduced due to shift AeroRP -->
       </product>
    </function>

    <function name="aero/moment/Pitch_alpha">
       <description>Pitch moment due to alpha</description>
       <product>
           <property>aero/qbar-psf</property>
           <property>metrics/Sw-sqft</property>
           <property>metrics/cbarw-ft</property>
           <property>aero/alpha-rad</property>
           <value> -0.895</value> <!-- VSP, war -->
       </product>
    </function>

    <function name="aero/moment/Pitch_elevator">
       <description>Pitch moment due to elevator</description>
       <product>
          <property>aero/qbar-psf</property>
          <property>metrics/Sw-sqft</property>
          <property>metrics/cbarw-ft</property>
          <property>fcs/elevator-pos-rad</property>
          <table>
             <independentVar lookup="row">aero/alpha-deg</independentVar>
             <independentVar lookup="column">velocities/mach</independentVar> <!-- VSP -->
             <tableData>
 0.05	0.1	0.15	0.2	0.25
-4	-1.322	-1.326	-1.332	-1.34	-1.353
-2	-1.338	-1.341	-1.348	-1.356	-1.368
0	-1.348	-1.352	-1.359	-1.365	-1.376
2	-1.356	-1.359	-1.363	-1.37	-1.382
4	-1.356	-1.36	-1.365	-1.374	-1.386
6	-1.354	-1.358	-1.362	-1.371	-1.387
8	-1.345	-1.349	-1.357	-1.38	-1.377
             </tableData>
           </table>
	  <!--(ported from C172p): the elevator looses efficiency when stalled-->
	   <table>
			<independentVar lookup="row">fcs/elevator-pos-rad</independentVar>
			<independentVar lookup="column">aero/alpha-deg</independentVar>
			<tableData>
					20  25   35     45     55      65      90
				-0.49   1   0.5  0.2    0.1    0.1     0.1     0.1
				0       1   0.6  0.3    0.15   0.1     0.1     0.1
				0.40    1   0.9  0.8    0.7    0.6     0.5     0.4
			</tableData>
	   </table>
        </product>
    </function>
	<function name="aero/moment/pitch_damp">
	  <description>Pitch damping derivative</description> <!-- VSP -->
	  <product>
           <property>aero/qbar-psf</property>
           <property>metrics/Sw-sqft</property>
           <property>metrics/cbarw-ft</property>
           <property>aero/ci2vel</property>
           <property>velocities/q-aero-rad_sec</property>
		<table>
			<independentVar lookup="row">velocities/mach</independentVar>
			<independentVar lookup="column">aero/alpha-deg</independentVar>
			<independentVar lookup="table">aero/beta-deg</independentVar>
			<tableData breakPoint="0.0">
							-4.0		-2.0		0.0			2.0			4.0			6.0			8.0
				0.05		-21.088585	-21.1057614	-21.0782163	-20.9995568	-20.8519835	-20.66133	-20.3616762
				0.1			-21.1364756	-21.1532287	-21.1256319	-21.0473299	-20.9028048	-20.7099502	-20.4118168
				0.15		-21.2175072	-21.2332256	-21.2050631	-21.1247845	-20.9803482	-20.7961632	-20.4977499
				0.2			-21.3326597	-21.3464894	-21.3177868	-21.2353171	-21.0947748	-20.9141394	-20.619777
				0.25		-21.4833533	-21.4961234	-21.4673669	-21.3856859	-21.2481215	-21.0629521	-20.7863627
			</tableData>
			<tableData breakPoint="5.0">
							-4.0		-2.0		0.0			2.0			4.0			6.0			8.0
				0.05		-20.5777434	-21.1812927	-21.0586204	-21.1958576	-20.9993045	-20.4243415	-20.1342218
				0.1			-20.7739346	-21.2090989	-21.1083548	-21.3038643	-21.0298037	-20.4615228	-20.219004
				0.15		-20.8071425	-21.270062	-21.0826555	-21.4374066	-21.1437735	-20.6090339	-20.3953145
				0.2			-21.0877206	-21.3738349	-21.1716954	-21.3232738	-21.2244692	-20.702392	-20.4494639
				0.25		-21.2499182	-21.5720298	-21.4578958	-21.2202198	-21.3597444	-20.7999423	-20.6098433
			</tableData>
			<tableData breakPoint="10.0">
							-4.0		-2.0		0.0			2.0			4.0			6.0			8.0
				0.05		-20.1980876	-20.2477467	-20.4386788	-20.2231101	-20.206019	-19.2787258	-19.2033172
				0.1			-20.2594691	-20.241369	-20.4398522	-20.3652457	-20.0377461	-19.8456277	-19.4792272
				0.15		-20.260498	-20.2813333	-20.461156	-20.5895981	-20.4273676	-20.0432377	-19.469364
				0.2			-20.4789218	-20.3475813	-20.4864081	-20.7453837	-20.2821822	-20.0765707	-19.6243465
				0.25		-20.6808276	-20.8631257	-20.5318128	-21.040778	-20.6938045	-20.5867508	-19.3741087
			</tableData>
		</table>
	  </product>
        </function>
    <function name="aero/moment/Pitch_alphadot">
       <description>Pitch moment due to alpha rate</description>
       <product>
           <property>aero/qbar-psf</property>
           <property>metrics/Sw-sqft</property>
           <property>metrics/cbarw-ft</property>
           <property>aero/ci2vel</property>
           <property>aero/alphadot-rad_sec</property>
           <value>-34</value> <!-- VSP -->
       </product>
    </function>
</axis>
<!-- ########################### -->
<!-- #########  YAW  ########### -->
<!-- ########################### -->
 <axis name="YAW">
    <function name="aero/moment/Yaw_beta">
       <description>Yaw moment due to beta</description>
       <product>
           <property>aero/qbar-psf</property>
           <property>metrics/Sw-sqft</property>
           <property>metrics/bw-ft</property>
           <property>aero/beta-rad</property>
                    <table>
                        <independentVar lookup="row">aero/alpha-deg</independentVar>
                        <tableData>
                            -4	0.047
                            -2	0.04
                            0	0.0353
                            2	0.0299
                            4	0.0247
                            6	0.0183
                            8	0.0119
                         </tableData>
                    </table>

       </product>
    </function>
    <function name="aero/moment/Yaw_damp">
	<description>Yaw damping derivative</description> <!-- VSP -->
	<product>
           <property>aero/qbar-psf</property>
           <property>metrics/Sw-sqft</property>
           <property>metrics/bw-ft</property>
           <property>aero/bi2vel</property>
           <property>velocities/r-aero-rad_sec</property>
	<value>-1</value>
	<value>0.13</value>
<!--
		<table>
			<independentVar lookup="row">velocities/mach</independentVar>
			<independentVar lookup="column">aero/alpha-deg</independentVar>
			<independentVar lookup="table">aero/beta-deg</independentVar>
			<tableData breakPoint="0.0">
							-4.0		-2.0		0.0			2.0			4.0			6.0			8.0
				0.05		-0.0075493	0.0300358	0.0684109	0.1064567	0.2044882	0.1888133	0.2206694
				0.1		-0.0075665	0.0303049	0.0686859	0.1067957	0.1711672	0.1878547	0.2214847
				0.15		-0.0075901	0.0307025	0.0691248	0.1074879	0.154608	0.1888659	0.2226526
				0.2		-0.0075558	0.0308097	0.0696787	0.1089063	0.1519113	0.1902304	0.2242214
				0.25		-0.0075744	0.0310099	0.0705226	0.1100854	0.1527581	0.1919795	0.2263743
			</tableData>
			<tableData breakPoint="5.0">
							-4.0		-2.0		0.0			2.0			4.0			6.0			8.0
				0.05		-0.0106815	0.0292007	0.0730931	0.1078651	0.1465177	0.1788915	0.2186863
				0.1		-0.0107552	0.0285788	0.0651989	0.1014559	0.1578753	0.1818913	0.2192621
				0.15		-0.0108298	0.0308847	0.0678772	0.10782		0.155316	0.1840464	0.2204386
				0.2		-0.0106455	0.0283101	0.0687918	0.1060971	0.1539386	0.1851368	0.2218354
				0.25		-0.0106045	0.0303362	0.0694549	0.1082405	0.1544519	0.1866893	0.2236249
			</tableData>
			<tableData breakPoint="10.0">
							-4.0		-2.0		0.0			2.0			4.0			6.0			8.0
				0.05		-0.0053699	0.03135	0.0653363	0.1035908	0.1381464	0.1744856	0.2150673
				0.1		-0.0058879	0.0313523	0.0652185	0.098402	0.1405635	0.1754072	0.2160878
				0.15		-0.0059847	0.0314686	0.0652977	0.1027306	0.1409711	0.1767761	0.2162108
				0.2		-0.0069782	0.0329833	0.0659633	0.1038122	0.1420719	0.1782835	0.21716
				0.25		-0.0062594	0.0324929	0.0692783	0.1042337	0.1438024	0.179382	0.2168763
			</tableData>
		</table>
-->
	</product>
  </function>
   <function name="aero/moment/yaw_rollrate">
	<description>Yaw moment due to roll rate</description> <!-- VSP -->
	<product>
           <property>aero/qbar-psf</property>
           <property>metrics/Sw-sqft</property>
           <property>metrics/bw-ft</property>
           <property>aero/bi2vel</property>
           <property>velocities/r-aero-rad_sec</property>
		<table>
			<independentVar lookup="row">velocities/mach</independentVar>
			<independentVar lookup="column">aero/alpha-deg</independentVar>
			<independentVar lookup="table">aero/beta-deg</independentVar>
			<tableData breakPoint="0.0">
							-4.0		-2.0		0.0			2.0			4.0			6.0			8.0
				0.05		0.0409106	0.038817	0.0371777	0.0357535	0.0340026	0.0322159	0.0306705
				0.1			0.0409392	0.0388551	0.0371881	0.0356726	0.0339771	0.0322046	0.0305835
				0.15		0.0409926	0.039064	0.0376081	0.0361795	0.0341013	0.0321927	0.0304174
				0.2			0.0413524	0.0395648	0.0372712	0.0362273	0.0341671	0.0322234	0.0301743
				0.25		0.0418167	0.0397055	0.0373605	0.0361354	0.0341955	0.0317671	0.0299292
			</tableData>
			<tableData breakPoint="5.0">
							-4.0		-2.0		0.0			2.0			4.0			6.0			8.0
				0.05		0.0407468	0.0392325	0.0373034	0.032659	0.0334937	0.0321848	0.0306448
				0.1			0.0408309	0.0392555	0.0373405	0.0327801	0.0336157	0.0320963	0.0305571
				0.15		0.041036	0.0394387	0.0381933	0.0356769	0.0336624	0.0321559	0.0304486
				0.2			0.0414679	0.0397124	0.0383664	0.0356962	0.0337131	0.032028	0.0302323
				0.25		0.0419497	0.0399832	0.0383991	0.0361119	0.0337867	0.0318755	0.0298564
			</tableData>
			<tableData breakPoint="10.0">
							-4.0		-2.0		0.0			2.0			4.0			6.0			8.0
				0.05		0.0402128	0.0396798	0.0369684	0.035486	0.0335775	0.0317696	0.0308652
				0.1			0.0401926	0.0395348	0.0367373	0.0352864	0.0332328	0.0319984	0.0312401
				0.15		0.0400475	0.039575	0.0368762	0.0354911	0.033084	0.0322514	0.0306458
				0.2			0.040083	0.0403446	0.0370506	0.0361417	0.0330736	0.0322186	0.0282789
				0.25		0.0405196	0.0404024	0.0372883	0.0362616	0.0334753	0.0320343	0.0263137
			</tableData>
		</table>
      </product>
    </function>
    <function name="aero/moment/Yaw_rudder">
       <description>Yaw moment due to rudder</description> <!-- VSP -->
       <product>
           <property>aero/qbar-psf</property>
           <property>metrics/Sw-sqft</property>
           <property>metrics/bw-ft</property>
           <property>fcs/rudder-pos-rad</property>
           <value>-1</value> <!-- sign -->
          <table>
             <independentVar lookup="row">aero/alpha-deg</independentVar>
             <independentVar lookup="column">velocities/mach</independentVar>
             <tableData>
	0.05	0.1	0.15	0.2	0.25
-4	0.04	0.04	0.0402	0.0405	0.0408
-2	0.039	0.0395	0.0397	0.0399	0.0402
0	0.039	0.0391	0.0393	0.0395	0.0397
2	0.038	0.0384	0.0385	0.0387	0.039
4	0.0378	0.0379	0.038	0.0381	0.0384
6	0.037	-0.0371	0.0373	0.03875	0.0378
8	0.0359	0.036	0.036	0.0362	0.0366
            </tableData>
           </table>
      </product>
    </function>
    <function name="aero/moment/Yaw_aileron">
       <description>Adverse yaw</description>
       <product>
           <property>aero/qbar-psf</property>
           <property>metrics/Sw-sqft</property>
           <property>metrics/bw-ft</property>
           <property>fcs/left-aileron-pos-rad</property>
           <value>-0.0034</value> <!-- VSP -->
       </product>
    </function>

  </axis>

</aerodynamics>
