<?xml version="1.0"?>
<?xml-stylesheet type="text/xsl" href="http://jsbsim.sourceforge.net/JSBSim.xsl"?>
<fdm_config xmlns:xsi="http://www.w3.org/2001/XMLSchema-instance" name="ASK21" version="2.0" release="ALPHA" xsi:noNamespaceSchemaLocation="http://jsbsim.sourceforge.net/JSBSim.xsd">
	<fileheader>
		<author> Benedikt Wolf (D-ECHO) using Aeromatic v 0.96 </author>
		<filecreationdate>2018-03-09</filecreationdate>
		<version> 09/2020 </version>
		<description> ASK21 Mi </description>
	</fileheader>
	<!--FRAME NOTES:
		x: + = front  - = rear
		y: + = right  - = left
		z: + = down   - = up
	-->
	<metrics file="Systems/ask21-metrics.xml"/>
	<mass_balance>
		<ixx unit="SLUG*FT2">      1000 </ixx>
		<iyy unit="SLUG*FT2">       504 </iyy>
		<izz unit="SLUG*FT2">      2355 </izz>
		<emptywt unit="KG">       360 </emptywt>	<!--	ref. [4] Technical Data table	-->
		<location name="CG" unit="M">
			<x>  -0.845   </x>	<!--	see CoG notes in FDM-references.md	-->
			<y>   0.00    </y>
			<z>   0.76674 </z>
		</location>
		<!--	For x-position, see CoG notes in FDM-references.md	-->
		<pointmass name="Pilot">
			<weight unit="KG">    80 </weight>
			<location name="POINTMASS" unit="M">
				<x> -2.85 </x>
				<y>  0.0  </y>
				<z>  0.5  </z>
			</location>
		</pointmass>
		<pointmass name="Copilot">
			<weight unit="KG">    80 </weight>
			<location name="POINTMASS" unit="M">
				<x> -1.715 </x>
				<y>  0.0   </y>
				<z>  0.6   </z>
			</location>
		</pointmass>
		<pointmass name="Left Baggage">
			<weight unit="KG">    2 </weight>
			<location name="POINTMASS" unit="M">
				<x> -1.385 </x>
				<y> -0.4   </y>
				<z>  0.6   </z>
			</location>
		</pointmass>
		<pointmass name="Right Baggage">
			<weight unit="KG">    2 </weight>
			<location name="POINTMASS" unit="M">
				<x> -1.385 </x>
				<y>  0.4   </y>
				<z>  0.6   </z>
			</location>
		</pointmass>
		<!--	approximate from three view drawing	-->
		<pointmass name="Spin Ballast">
			<weight unit="KG">   0 </weight>
			<location name="POINTMASS" unit="M">
				<x> 3.5 </x>
				<y> 0.0 </y>
				<z> 0.8 </z>
			</location>
		</pointmass>
	</mass_balance>
	<ground_reactions>
		<contact type="BOGEY" name="FRONT_WHEEL">
			<location unit="M">
				<x> -3.29687 </x>
				<y>  0.0 </y>
				<z> 0.07763 </z>
			</location>
			<static_friction>  0.600 </static_friction>
			<dynamic_friction> 0.400 </dynamic_friction>
			<rolling_friction> 0.020 </rolling_friction>
			<spring_coeff unit="LBS/FT">      9323.00 </spring_coeff>
			<damping_coeff unit="LBS/FT/SEC">   661.50 </damping_coeff>
			<max_steer unit="DEG">20</max_steer>
			<brake_group>NONE</brake_group>
			<retractable>0</retractable>
		</contact>
		<contact type="BOGEY" name="MAIN_WHEEL">
			<location unit="M">
				<x> -1.01145 </x>
				<y>   0.0 </y>
				<z>0.00498 </z>
			</location>
			<static_friction>  0.600 </static_friction>
			<dynamic_friction> 0.400 </dynamic_friction>
			<rolling_friction> 0.020 </rolling_friction>
			<spring_coeff unit="LBS/FT">      6323.00 </spring_coeff>
			<damping_coeff unit="LBS/FT/SEC">   661.50 </damping_coeff>
			<max_steer unit="DEG">0</max_steer>
			<brake_group>LEFT</brake_group>
			<retractable>0</retractable>
		</contact>
		<contact type="BOGEY" name="TAIL_WHEEL">
			<location unit="M">
				<x>  3.60148 </x>
				<y>   0.00 </y>
				<z> 0.4706 </z>
			</location>
			<static_friction>  0.600 </static_friction>
			<dynamic_friction> 0.400 </dynamic_friction>
			<rolling_friction> 0.020 </rolling_friction>
			<spring_coeff unit="LBS/FT">        9096.90 </spring_coeff>
			<damping_coeff unit="LBS/FT/SEC">   198.45 </damping_coeff>
			<max_steer unit="DEG">0</max_steer>
			<brake_group>NONE</brake_group>
			<retractable>0</retractable>
		</contact>
		<contact type="BOGEY" name="LEFT_WING_SKID">
			<location unit="M">
				<x>  -1.25364 </x>
				<y>  -8.43947 </y>
				<z> 1.22131 </z>
			</location>
			<static_friction>  0.600 </static_friction>
			<dynamic_friction> 0.400 </dynamic_friction>
			<rolling_friction> 0.020 </rolling_friction>
			<spring_coeff unit="LBS/FT">        396.90 </spring_coeff>
			<damping_coeff unit="LBS/FT/SEC">   198.45 </damping_coeff>
			<max_steer unit="DEG">0</max_steer>
			<brake_group>NONE</brake_group>
			<retractable>0</retractable>
		</contact>
		<contact type="BOGEY" name="RIGHT_WING_SKID">
			<location unit="M">
				<x>  -1.25364 </x>
				<y>  8.43947 </y>
				<z> 1.22131 </z>
			</location>
			<static_friction>  0.600 </static_friction>
			<dynamic_friction> 0.400 </dynamic_friction>
			<rolling_friction> 0.020 </rolling_friction>
			<spring_coeff unit="LBS/FT">        396.90 </spring_coeff>
			<damping_coeff unit="LBS/FT/SEC">   198.45 </damping_coeff>
			<max_steer unit="DEG">0</max_steer>
			<brake_group>NONE</brake_group>
			<retractable>0</retractable>
		</contact>
		<contact type="BOGEY" name="LEFT_WING_ASSIST_GEAR">
			<location unit="M">
				<x>  -1.25364 </x>
				<y>  -8.43947 </y>
				<z> 0.05 </z>
			</location>
			<static_friction>  0.300 </static_friction>
			<dynamic_friction> 0.200 </dynamic_friction>
			<rolling_friction> 0.200 </rolling_friction>
			<spring_coeff unit="LBS/FT">        396.90 </spring_coeff>
			<damping_coeff unit="LBS/FT/SEC">   198.45 </damping_coeff>
			<max_steer unit="DEG">0</max_steer>
			<brake_group>NONE</brake_group>
			<retractable>1</retractable>
		</contact>
		<contact type="BOGEY" name="RIGHT_WING_ASSIST_GEAR">
			<location unit="M">
				<x>  -1.25364 </x>
				<y>  8.43947 </y>
				<z> 0.05 </z>
			</location>
			<static_friction>  0.300 </static_friction>
			<dynamic_friction> 0.200 </dynamic_friction>
			<rolling_friction> 0.200 </rolling_friction>
			<spring_coeff unit="LBS/FT">        396.90 </spring_coeff>
			<damping_coeff unit="LBS/FT/SEC">   198.45 </damping_coeff>
			<max_steer unit="DEG">0</max_steer>
			<brake_group>NONE</brake_group>
			<retractable>1</retractable>
		</contact>
	</ground_reactions>
	<propulsion>
		<engine file="IAE50R-AA">
			<location unit="M">
				<x>  0.0 </x>
				<y>  0.00 </y>
				<z>  0.88 </z>
			</location>
			<orient unit="DEG">
				<pitch> 0.00 </pitch>
				<roll>  0.00 </roll>
				<yaw>   0.00 </yaw>
			</orient>
			<feed>0</feed>
			<thruster file="AS2F1-1_R153-92-N1">
				<sense> 1 </sense>
				<location unit="M">
					<x>  -0.40978</x>
					<y>   0.00 </y>
					<z>   1.84412 </z>
				</location>
				<orient unit="DEG">
					<pitch> 1 </pitch>
					<roll>  0.00 </roll>
					<yaw>   0.00 </yaw>
				</orient>
			</thruster>
		</engine>
		<!--	ref. [2] 2.12 Fuel and Oil	-->
		<tank type="FUEL" number="0">
			<location unit="M">
				<x>-1.06023 </x>
				<y> 0.0 </y>
				<z> 0.9575 </z>
			</location>
			<capacity unit="KG"> 16.936 </capacity>	<!--	23.2 l AVGAS * 0.73 kg/l = 16.936 kg	-->
			<unusable unit="L">   0.2   </unusable>	<!--	23l out of 23.2l usable	-->
			<contents unit="KG"> 15.0   </contents>
		</tank>
	</propulsion>
	<flight_control name="FCS: ASK21">
		<channel name="Pitch">
			<summer name="Pitch Trim Sum">
				<input>fcs/elevator-cmd-norm</input>
				<input>fcs/pitch-trim-cmd-norm</input>
				<clipto>
					<min> -1 </min>
					<max>  1 </max>
				</clipto>
			</summer>
			<aerosurface_scale name="Elevator Control">
				<input>fcs/pitch-trim-sum</input>
				<range>
					<min> -0.35 </min>
					<max>  0.35 </max>
				</range>
				<output>fcs/elevator-pos-rad</output>
			</aerosurface_scale>
			<aerosurface_scale name="elevator normalization">
				<input>fcs/elevator-pos-rad</input>
				<domain>
					<min> -0.35 </min>
					<max>  0.35 </max>
				</domain>
				<range>
					<min> -1 </min>
					<max>  1 </max>
				</range>
				<output>fcs/elevator-pos-norm</output>
			</aerosurface_scale>
		</channel>
		<channel name="Roll">
			<summer name="Roll Trim Sum">
				<input>fcs/aileron-cmd-norm</input>
				<input>fcs/roll-trim-cmd-norm</input>
				<clipto>
					<min> -1 </min>
					<max>  1 </max>
				</clipto>
			</summer>
			<aerosurface_scale name="Left Aileron Control">
				<input>fcs/roll-trim-sum</input>
				<range>
					<min> -0.35 </min>
					<max>  0.35 </max>
				</range>
				<output>fcs/left-aileron-pos-rad</output>
			</aerosurface_scale>
			<aerosurface_scale name="Right Aileron Control">
				<input>fcs/roll-trim-sum</input>
				<range>
					<min> -0.35 </min>
					<max>  0.35 </max>
				</range>
				<output>fcs/right-aileron-pos-rad</output>
			</aerosurface_scale>
			<aerosurface_scale name="left aileron normalization">
				<input>fcs/left-aileron-pos-rad</input>
				<domain>
					<min> -0.35 </min>
					<max>  0.35 </max>
				</domain>
				<range>
					<min> -1 </min>
					<max>  1 </max>
				</range>
				<output>fcs/left-aileron-pos-norm</output>
			</aerosurface_scale>
			<aerosurface_scale name="right aileron normalization">
				<input>fcs/right-aileron-pos-rad</input>
				<domain>
					<min> -0.35 </min>
					<max>  0.35 </max>
				</domain>
				<range>
					<min> -1 </min>
					<max>  1 </max>
				</range>
				<output>fcs/right-aileron-pos-norm</output>
			</aerosurface_scale>
		</channel>
		<channel name="Yaw">
			<summer name="Rudder Command Sum">
				<input>fcs/rudder-cmd-norm</input>
				<input>fcs/yaw-trim-cmd-norm</input>
				<clipto>
					<min> -1 </min>
					<max>  1 </max>
				</clipto>
			</summer>
			<aerosurface_scale name="Rudder Control">
				<input>fcs/rudder-command-sum</input>
				<range>
					<min> -1 </min>
					<max>  1 </max>
				</range>
				<output>fcs/rudder-pos-rad</output>
			</aerosurface_scale>
			<aerosurface_scale name="rudder normalization">
				<input>fcs/rudder-pos-rad</input>
				<domain>
					<min> -1 </min>
					<max>  1 </max>
				</domain>
				<range>
					<min> -1 </min>
					<max>  1 </max>
				</range>
				<output>fcs/rudder-pos-norm</output>
			</aerosurface_scale>
		</channel>
		<channel name="Flaps">
			<kinematic name="Flaps Control">
				<input>fcs/flap-cmd-norm</input>
				<traverse>
					<setting>
						<position>  0 </position>
						<time>      0 </time>
					</setting>
					<setting>
						<position> 15 </position>
						<time>      4 </time>
					</setting>
					<setting>
						<position> 30 </position>
						<time>      3 </time>
					</setting>
				</traverse>
				<output>fcs/flap-pos-deg</output>
			</kinematic>
			<aerosurface_scale name="flap normalization">
				<input>fcs/flap-pos-deg</input>
				<domain>
					<min>  0 </min>
					<max> 30 </max>
				</domain>
				<range>
					<min> 0 </min>
					<max> 1 </max>
				</range>
				<output>fcs/flap-pos-norm</output>
			</aerosurface_scale>
		</channel>
		<channel name="Landing Gear">
  </channel>
		<channel name="Speedbrake">
			<!--
	  <function name="fcs/speedbrake-int-norm">
		  <description>Speedbrake only operates through 9/10 of the pulling length, rest is for wheel brake</description>
		  <table>
			  <independentVar lookup="row">fcs/speedbrake-cmd-norm</independentVar>
			  <tableData>
				  0	0
				  0.9	1
				  1	1
			  </tableData>
		  </table>
	  </function>-->
			<kinematic name="Speedbrake Control">
				<input>fcs/speedbrake-int-norm</input>
				<traverse>
					<setting>
						<position> 0 </position>
						<time>     0 </time>
					</setting>
					<setting>
						<position> 1 </position>
						<time>     0 </time>
					</setting>
				</traverse>
				<output>fcs/speedbrake-pos-norm</output>
			</kinematic>
		</channel>
	</flight_control>
	<system file="ask21mi-fcs"/>
	<aerodynamics file="Systems/ask21-aero.xml"/>
	<external_reactions file="Systems/ask21-external_reactions.xml" />
</fdm_config>
